H(B) := 22*tan(B) + 220*B
i(I) := 2*(1 - e^(-0.01*|I|))
i(0) = 0
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i(0.1) = 0.001999
i(10) = 0.190325
I_0(Ф) := 2*10^21*Ф^7 + 3*10^4*Ф
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i2(1000) =  # error: This variable is undefined.
H(0.3) = 72.8054
H(1.11*sqrt(2)) = 21929.4
H(1.35) = 395.015
H(1.55) = 1398.73
a := 0
b := 0
c := 0
Given
a*tan(b*0.3) + c*0.3 == 70
a*tan(b*1.35) + c*1.35 == 400
i2(2.41*10^-2) =  # error
a*tan(b*1.55) + c*1.55 == 1600
i3(I) := |I/(15 - I*0.029)|
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Minerr(a, b, c) = [0; 0; 704.751]
R_u(B) := H(B)/B
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H(B) := 0.1*tan(1.5*B) + 0*B
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H(1) = 1.41014
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