# Для однофазного трансформатора запишем
j := sqrt(-1)
S_ном := 10
U_1ном := 115
U_2ном := 11
u_к% := 10.5
dP_кз := 0.058
i_xx := 0.9
dP_xx := 0.014
# Номинальное напряжение на обмотке высшего напряжения
U_1ном_фаз := U_1ном/sqrt(3) = 66.3953
U_2ном_фаз := U_2ном/sqrt(3) = 6.35085
# Номинальные токи фаз
I_1ном := S_ном/(sqrt(3)*U_1ном) = 0.0502044
I_2ном := S_ном/(sqrt(3)*U_2ном) = 0.524864
# Активные сопротивления обмоток
R_скв := dP_кз*U_1ном^2/S_ном^2 = 7.6705
R_1 := R_скв/2 = 3.83525
R_2 := R_скв/2*(U_2ном/U_1ном)^2 = 0.03509
# Напряжение на фазе при о.к.з.
U_1к := u_к%/100*U_1ном_фаз = 6.9715
# Ток холостого хода
I_xx := i_xx/100*I_1ном = 0.000451839
# Порери холостого хода
dQ_xx := sqrt((sqrt(3)*I_xx*U_1ном)^2 - dP_xx^2) = 0.0889044
# Реактивные потери окз
dQ_кз := sqrt((sqrt(3)*I_1ном*u_к%/100*U_1ном)^2 - dP_кз^2) = 1.0484
# Параметры первичной обмотки
X_1 := 0
X_мДобавление1проис := 0
X_u := 0
R_u := 0
I_u := 1
I_u.к := 2
I_2н := I_2ном
X_м2 := 0
X_2 := 0
X_1 := 1/2*sqrt((u_к%/100*U_1ном^2/S_ном)^2 - R_скв^2) = 69.3252
R_u := (dP_xx/3 - I_xx^2*R_1)/I_u^2 = 0.00466588
X_u.пот := R_u*dQ_xx/dP_xx = 0.0296298
# Расчет для компьютера | На этой половине Рассчет в векторной форме
k_св1 := 1/sqrt(2) = 0.707107
Given
|I_u| == 1
X_м1 := U_1ном_фаз/I_u = 66.3953
U_1ном_фаз*e^(j*atan(dQ_xx/dP_xx)) == I_xx*(R_1 + j*X_1) + j*X_м1*I_u
X_u := X_м1^2/(k_св1^2*X_1) = 127.178
Im(X_u) == 0
X_u > 0
I_u*(R_u - j*X_u.пот) + j*I_xx*X_м1 == 0
X_м1 == 1/sqrt(2)*sqrt(X_1*X_u)
[X_u; X_м1; I_u] := Minerr(X_u, X_м1, I_u) = [127.059; 66.3641; 0.987819 - 0.155603i]
# Коэффициент магнитной связи обмотоки ВН с магнитопроводом
k_св1 == (X_м1/sqrt(X_1*X_u))
I_u*(R_u - j*X_u.пот) + j*I_xx*X_м1 = -1.4286e-6 - 9.03672e-6i
# Так как индуктивность обмотки в первом приближении пропорциональна квадрату числа витков
I_u*(R_u + j(X_u - X_u)) + j*I_xx*X_м1 =  # error: This value must be a function, but has the form: Unitless.
X_м1*|I_u| == U_1ном_фаз
X_2 := X_1*(U_2ном/U_1ном)^2 = 0.63428
# Считаем счо магнитная связь обмотки ВН и магнитовпровода такая, же как и у обм. НН и магнитопровода
I_xx*(I_xx*R_1 + j*I_xx*X_1 + j*I_u*X_м1) + I_u*(j*X_u*I_u + j*X_м1*I_xx + R_u*I_u) == (dP_xx + j*dQ_xx)/3
0 == I_u.к*(R_u + j*X_u) + j*I_1ном*X_м1 + j*I_2н*X_м2
X_м2 := k_св1*sqrt(X_2*X_u) = 6.34787
0 == I_u.к*(R_u + j*X_u) + j*I_1ном*X_м1 + j*I_2н*X_м2
## Проверка:
I_u*(R_u - j*X_u.пот) + j*U_1ном/U_2ном*I_xx*X_м2 = -1.4286e-6 - 9.03672e-6i
# 1) По напряжению холостого хода на выводах обмотки НН
X_м2*|I_u| == U_2ном_фаз
u_к%/100*U_1ном_фаз*e^(j*atan(dQ_кз/dP_кз)) == I_1ном*(R_1 + j*X_1) + j*X_м1*I_u.к
X_м2*|I_u| = 6.34787
U_2ном_фаз = 6.35085
0 == I_2н*(R_2 + j*X_2) + j*I_u*X_м2
# 2) По потерям короткого замыкания
X_м2*|I_u| == U_2ном_фаз
# Индукция магнитного поля, обуславливающая потери холостого хода пропорциональна подведенному напряжению
I_1ном*(I_1ном*(R_1 + j*X_1) + j*I_u.к*X_м1) + I_u.к*(I_u.к*(R_u + j*X_u) + j*X_м1*I_1ном + j*X_м2*I_2н) + I_2н*(I_2н*(R_2 + j*X_2) + j*I_u.к*X_м2) == (dP_кз + j*dQ_кз)/3
|I_2н| == I_2ном
B_m == E_1/(4.44*f*w*S)
# Тогда потери холостого хода пропорциональны квадрату подведенного напряжения
# Так как ток Iu (в контуре магнитопровода) связан с потерями в магнитопроводе, то в режиме короткого замыкания:
I_u.кз == (U_1к/U_1ном_фаз)^2*I_u.xx == (u_к%/100)^2*I_u.xx
I_1ном^2*R_1 + I_2ном^2*R_2 + ((u_к%/100)^2*|I_u|)^2*R_u == (dP_кз + dP_xx*(U_1к/U_1ном_фаз)^2)/3 == (dP_кз + dP_xx*(u_к%/100)^2)/3
I_1ном^2*R_1 + I_2ном^2*R_2 + ((u_к%/100)^2*|I_u|)^2*Re(R_u) = 0.0193339
(dP_кз + dP_xx*(u_к%/100)^2)/3 = 0.0193848
## Параметры схемы замещения
L_1 := X_1/(100*π) = 0.220669
R_1 = 3.83525
R_2 = 0.03509
L_2 := X_2/(100*π) = 0.00201898
L_u := |X_u/(100*π)| = 0.404441
R_u = 0.00466588
C_u := 1/|100*π*(X_u + X_u.пот)| = 2.50463e-5
L_u.пот := |X_u.пот/(100*π)| = 9.43147e-5
L_м1 := |X_м1/(100*π)| = 0.211244
X_u.пот = 0.0296298
C_u.пот := 1/|100*π*X_u.пот| = 0.107429
L_м2 := |X_м2/(100*π)| = 0.0202059
k := U_1ном_фаз/U_2ном_фаз
Z_a := (R_u + j*X_u.пот - j*(X_м1 + X_м1/k) + j*X_м1/k*(R_2 + j*X_1/k^2 - j*X_м1/k)/(R_2 + j*X_1/k^2)) = 3.50855 - 129.67i
R_1 + j*(X_1 - X_м1) + j*X_м1*(R_u + j*(-X_u.пот - X_м1))/(R_u - j*X_u.пот) = 22844.2 + 145113i
R_1 + j*(X_1 - X_м1) + j*X_м1*Z_a/(j*X_м1 + Z_a) = 7.67916 + 138.682i
u_к%/100*U_1ном_фаз*e^(j*atan(dQ_кз/dP_кз))/I_1ном = 7.6705 + 138.65i
U_1ном_фаз*e^(j*atan(dQ_xx/dP_xx))/I_xx = 22858 + 145156i
k_т := U_2ном_фаз/U_1ном_фаз = 0.0956522
I_u := 1
X_м1 := U_1ном_фаз/I_u = 66.3953
X_м2 := U_2ном_фаз/I_u = 6.35085
X_1 > 0
X_2 > 0
X_σ1 := 1/2*sqrt((u_к%/100*U_1ном^2/S_ном)^2 - R_скв^2) = 69.3252
X_σ2 := X_σ1*k_т^2 = 0.63428
X_2 := X_σ2 = 0.63428
X_1 := X_σ1 = 69.3252
X_u1 := X_м1^2/(1^2*X_1) = 63.5892
X_u2 := X_м2^2/(1^2*X_2) = 63.5892
X_u := X_u1 + X_u2 = 127.178
R_u := (dP_xx/3 - I_xx^2*R_1)/I_u^2 = 0.00466588
R_u := I_xx*X_м1*cos(atan(dQ_xx/dP_xx))/I_u = 0.00466667
X_u.пот := (dQ_xx/3 - I_xx^2*X_1 - 2*X_м1*I_xx*I_u*sin(atan(dQ_xx/dP_xx)))/I_u^2 = -0.029649
X_u.пот := -I_xx*X_м1*sin(atan(dQ_xx/dP_xx))/I_u = -0.0296348
L_1 := X_1/(100*π) = 0.220669
R_1 = 3.83525
R_2 = 0.03509
L_2 := X_2/(100*π) = 0.00201898
L_u := |X_u/(100*π)| = 0.404821
R_u = 0.00466667
C_u := 1/|100*π*(X_u - X_u.пот)| = 2.50228e-5
L_м1 := |X_м1/(100*π)| = 0.211343
X_u.пот = -0.0296348
L_м2 := |X_м2/(100*π)| = 0.0202154
k := U_1ном_фаз/U_2ном_фаз
u_к%/100*U_1ном_фаз*e^(j*atan(dQ_кз/dP_кз))/I_1ном = 7.6705 + 138.65i
U_1ном_фаз*e^(j*atan(dQ_xx/dP_xx))/I_xx = 22858 + 145156i
Z_a := (R_u + j*X_u.пот - j*(X_м1 + X_м1/k) + j*X_м1/k*(R_2 + j*X_1/k^2 - j*X_м1/k)/(R_2 + j*X_1/k^2)) = 3.51185 - 129.82i
R_1 + j*(X_1 - X_м1) + j*X_м1*Z_a/(j*X_м1 + Z_a) = 7.672 + 138.618i
R_1 + j*(X_1 - X_м1) + j*X_м1*(R_u + j*(X_u.пот - X_м1))/(R_u + j*X_u.пот) = 22861.9 + 145225i
Z_xx := U_1ном_фаз/I_xx = 146944
Z_кз := 0.105*U_1ном_фаз/I_1ном = 138.863
k_м := 0.3
Given
Z_кз == X_1 - k_м^2*X_1/(2 - k_м^2)
Z_xx == X_1*(1 - k_м^2*0.5)
[k_м; X_1] := Find(k_м, X_1) = [0.999882; 293819]
X_1 - k_м^2*X_1/(2 - k_м^2) = 138.862
X_1*(1 - k_м^2*0.5) = 146944
