# Расчет простейшей цепи
j := sqrt(-1)
E := 1
R := 200
L := 0.001
C := 10^-5
A(p) := E
B(p) := L*p^2 + R*p + 1/C → 200*p + 0.001*p^2 + 100000
p := [(sqrt(C^2*R^2 - 4*C*L) - C*R)/(2*C*L); -(sqrt(C^2*R^2 - 4*C*L) + C*R)/(2*C*L)] → [-501.256289338; -199498.743711] = [-501.256; -199499]
B'(p[1]) =  # error: Эта переменная неопределена.
B'(p) := d/dp(B(p)) → 0.002*p + 200
i(t) := sum(A(p[i])/B'(p[i])*e^(p[i]*t), i = 0 .. 1)
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